# OpenSim document version 30000
Model subject01:
  length_units: meters
  force_units: N
  gravity: 0 -9.80665 0
  credits:
    Delp S.L., Loan J.P., Hoy M.G., Zajac F.E., Topp E.L., Rosen J.M., Thelen D.G., Anderson F.C., Seth A., Hamner S.R.
  publications:
    Notes: 3D, 23 DOF gait model created by D.G. Thelen, Univ. of Wisconsin-Madison, and Samuel Hamner, Ajay Seth, Frank C. Anderson, and Scott L. Delp, Stanford University. Lower extremity joint defintions based on Delp et al. (1990). Low back joint and anthropometry based on Anderson and Pandy (1999, 2001). Planar knee model of Yamaguchi and Zajac (1989). Seth removed the patella to avoid kinematic constraints; insertions of the quadrucepts are handled with moving points in the tibia frame. Hamner added arms adapted from Holzbaur et al., 2005. Hamner, S.R., Seth, A, Delp, S.L.: Muscle contributions to propulsion and support during running. Journal of Biomechanics, 2010. Delp, S.L., Loan, J.P., Hoy, M.G., Zajac, F.E., Topp E.L., Rosen, J.M.: An interactive graphics-based model of the lower extremity to study orthopaedic surgical procedures, IEEE Transactions on Biomedical Engineering, vol. 37, pp. 757-767, 1990. Yamaguchi G.T., Zajac F.E.: A planar model of the knee joint to characterize the knee extensor mechanism." J . Biomech. vol. 21. pp. 1-10. 1989. Anderson F.C., Pandy M.G.: A dynamic optimization solution for vertical jumping in three dimensions. Computer Methods in Biomechanics and Biomedical Engineering 2:201-231, 1999. Anderson F.C., Pandy M.G.: Dynamic optimization of human walking. Journal of Biomechanical Engineering 123:381-390, 2001. Holzbaur, KR, WM Murray and SL Delp, 2005. A model of the upper extremity for simulating musculoskeletal surgery and analyzing neuromuscular control. Ann Biomed Eng 33(6): 829-840.
  BodySet:
    Body ground: mass=0 mass_center=(0 0 0) inertia_xx=0 inertia_yy=0 inertia_zz=0
    Body pelvis: mass=11.3078 mass_center=(-0.0623853 0 0) inertia_xx=0.07560144 inertia_yy=0.07560144
        inertia_zz=0.04328597 meshes=(sacrum.vtp pelvis.vtp l_pelvis.vtp)
      CustomJoint ground_pelvis: parent_body=ground location_in_parent=(0 0 0) location=(0 0 0)
        Coordinate pelvis_tilt: motion_type=rotational default_value=0 range=(-1.570796 1.570796) clamped=true
        Coordinate pelvis_list: motion_type=rotational default_value=0 range=(-1.570796 1.570796) clamped=true
        Coordinate pelvis_rotation: motion_type=rotational default_value=0 range=(-1.570796 1.570796) clamped=true
        Coordinate pelvis_tx: motion_type=translational default_value=0 range=(-5 25) clamped=true
        Coordinate pelvis_ty: motion_type=translational default_value=0 range=(-1 2) clamped=true
        Coordinate pelvis_tz: motion_type=translational default_value=0 range=(-3 3) clamped=true
        SpatialTransform:
          TransformAxis rotation1: coordinates=pelvis_tilt axis=(0 0 1) LinearFunction(coefficients=1 0)
          TransformAxis rotation2: coordinates=pelvis_list axis=(1 0 0) LinearFunction(coefficients=1 0)
          TransformAxis rotation3: coordinates=pelvis_rotation axis=(0 1 0) LinearFunction(coefficients=1 0)
          TransformAxis translation1: coordinates=pelvis_tx axis=(1 0 0) LinearFunction(coefficients=1 0)
          TransformAxis translation2: coordinates=pelvis_ty axis=(0 1 0) LinearFunction(coefficients=1 0)
          TransformAxis translation3: coordinates=pelvis_tz axis=(0 0 1) LinearFunction(coefficients=1 0)
    Body femur_r: mass=8.930827 mass_center=(0 -0.181569 0) inertia_xx=0.1398369 inertia_yy=0.02480115
        inertia_zz=0.1398369 meshes=femur_r.vtp
      CustomJoint hip_r: parent_body=pelvis location_in_parent=(-0.06238527 -0.05832625 0.07283989) location=(0 0 0)
        Coordinate hip_flexion_r: motion_type=rotational default_value=0 range=(-2.094395 2.094395) clamped=true
        Coordinate hip_adduction_r: motion_type=rotational default_value=0 range=(-2.094395 2.094395) clamped=true
        Coordinate hip_rotation_r: motion_type=rotational default_value=0 range=(-2.094395 2.094395) clamped=true
        SpatialTransform: axes_held_at_zero=(translation1 translation2 translation3)
          TransformAxis rotation1: coordinates=hip_flexion_r axis=(0 0 1) LinearFunction(coefficients=1 0)
          TransformAxis rotation2: coordinates=hip_adduction_r axis=(1 0 0) LinearFunction(coefficients=1 0)
          TransformAxis rotation3: coordinates=hip_rotation_r axis=(0 1 0) LinearFunction(coefficients=1 0)
    Body tibia_r: mass=3.559791 mass_center=(0 -0.208895 0) inertia_xx=0.05917499 inertia_yy=0.003317174
        inertia_zz=0.05917499 meshes=(tibia_r.vtp fibula_r.vtp)
      CustomJoint knee_r: parent_body=femur_r location_in_parent=(0.0041 -0.41 0) location=(0 0 0)
        Coordinate knee_angle_r: motion_type=rotational default_value=0 range=(-2.5307 0.1745329) clamped=true
        SpatialTransform: axes_held_at_zero=(rotation2 rotation3 translation3)
          TransformAxis rotation1: coordinates=knee_angle_r axis=(0 0 1) LinearFunction(coefficients=1 0)
          TransformAxis translation1: coordinates=knee_angle_r axis=(1 0 0) Constant(value=0)
          TransformAxis translation2: coordinates=knee_angle_r axis=(0 1 0) Constant(value=0)
    Body talus_r: mass=0.09601594 mass_center=(0 0 0) inertia_xx=0.0007391952 inertia_yy=0.0007039256
        inertia_zz=0.0007039256 meshes=talus_rv.vtp
      CustomJoint ankle_r: parent_body=tibia_r location_in_parent=(0 -0.4811181 0) location=(0 0 0)
        Coordinate ankle_angle_r: motion_type=rotational default_value=0 range=(-1.570796 1.570796) clamped=true
        SpatialTransform: axes_held_at_zero=(rotation2 rotation3 translation1 translation2 translation3)
          TransformAxis rotation1: coordinates=ankle_angle_r axis=(-0.1050135 -0.1740224 0.9791263)
              LinearFunction(coefficients=1 0)
    Body calcn_r: mass=1.200199 mass_center=(0.0834506 0.0263226 0) inertia_xx=0.001034873 inertia_yy=0.002657136
        inertia_zz=0.002657136 meshes=foot.vtp
      CustomJoint subtalar_r: parent_body=talus_r location_in_parent=(-0.04069888 -0.0368078 0.006949172)
          location=(0 0 0)
        Coordinate subtalar_angle_r: motion_type=rotational default_value=0 range=(-1.570796 1.570796) clamped=true
        SpatialTransform: axes_held_at_zero=(rotation2 rotation3 translation1 translation2 translation3)
          TransformAxis rotation1: coordinates=subtalar_angle_r axis=(0.7871796 0.6047475 -0.1209495)
              LinearFunction(coefficients=1 0)
    Body toes_r: mass=0.2079705 mass_center=(0.0288739 0.00526452 -0.0153549) inertia_xx=7.391952e-5
        inertia_yy=0.0001372582 inertia_zz=0.0001372582 meshes=bofoot.vtp
      CustomJoint mtp_r: parent_body=calcn_r location_in_parent=(0.1492097 -0.001754841 0.0009476144) location=(0 0 0)
        Coordinate mtp_angle_r: motion_type=rotational default_value=0 range=(-1.570796 1.570796) clamped=true
        SpatialTransform: axes_held_at_zero=(rotation2 rotation3 translation1 translation2 translation3)
          TransformAxis rotation1: coordinates=mtp_angle_r axis=(-0.5809544 0 0.8139361)
              LinearFunction(coefficients=1 0)
    Body femur_l: mass=8.930827 mass_center=(0 -0.181569 0) inertia_xx=0.1398369 inertia_yy=0.02480115
        inertia_zz=0.1398369 meshes=femur_l.vtp
      CustomJoint hip_l: parent_body=pelvis location_in_parent=(-0.06238527 -0.05832625 -0.07283989) location=(0 0 0)
        Coordinate hip_flexion_l: motion_type=rotational default_value=0 range=(-2.094395 2.094395) clamped=true
        Coordinate hip_adduction_l: motion_type=rotational default_value=0 range=(-2.094395 2.094395) clamped=true
        Coordinate hip_rotation_l: motion_type=rotational default_value=0 range=(-2.094395 2.094395) clamped=true
        SpatialTransform: axes_held_at_zero=(translation1 translation2 translation3)
          TransformAxis rotation1: coordinates=hip_flexion_l axis=(0 0 1) LinearFunction(coefficients=1 0)
          TransformAxis rotation2: coordinates=hip_adduction_l axis=(-1 0 0) LinearFunction(coefficients=1 0)
          TransformAxis rotation3: coordinates=hip_rotation_l axis=(0 -1 0) LinearFunction(coefficients=1 0)
    Body tibia_l: mass=3.559791 mass_center=(0 -0.208895 0) inertia_xx=0.05917499 inertia_yy=0.003317174
        inertia_zz=0.05917499 meshes=(tibia_l.vtp fibula_l.vtp)
      CustomJoint knee_l: parent_body=femur_l location_in_parent=(0.0041 -0.41 0) location=(0 0 0)
        Coordinate knee_angle_l: motion_type=rotational default_value=0 range=(-2.5307 0.1745329) clamped=true
        SpatialTransform: axes_held_at_zero=(rotation2 rotation3 translation3)
          TransformAxis rotation1: coordinates=knee_angle_l axis=(0 0 1) LinearFunction(coefficients=1 0)
          TransformAxis translation1: coordinates=knee_angle_l axis=(1 0 0) Constant(value=0)
          TransformAxis translation2: coordinates=knee_angle_l axis=(0 1 0) Constant(value=0)
    Body talus_l: mass=0.09601594 mass_center=(0 0 0) inertia_xx=0.0007391952 inertia_yy=0.0007039256
        inertia_zz=0.0007039256 meshes=talus_lv.vtp
      CustomJoint ankle_l: parent_body=tibia_l location_in_parent=(0 -0.4811181 0) location=(0 0 0)
        Coordinate ankle_angle_l: motion_type=rotational default_value=0 range=(-1.570796 1.570796) clamped=true
        SpatialTransform: axes_held_at_zero=(rotation2 rotation3 translation1 translation2 translation3)
          TransformAxis rotation1: coordinates=ankle_angle_l axis=(0.1050135 0.1740224 0.9791263)
              LinearFunction(coefficients=1 0)
    Body calcn_l: mass=1.200199 mass_center=(0.0834506 0.0263226 0) inertia_xx=0.001034873 inertia_yy=0.002657136
        inertia_zz=0.002657136 meshes=l_foot.vtp
      CustomJoint subtalar_l: parent_body=talus_l location_in_parent=(-0.04069888 -0.0368078 -0.006949172)
          location=(0 0 0)
        Coordinate subtalar_angle_l: motion_type=rotational default_value=0 range=(-1.570796 1.570796) clamped=true
        SpatialTransform: axes_held_at_zero=(rotation2 rotation3 translation1 translation2 translation3)
          TransformAxis rotation1: coordinates=subtalar_angle_l axis=(-0.7871796 -0.6047475 -0.1209495)
              LinearFunction(coefficients=1 0)
    Body toes_l: mass=0.2079705 mass_center=(0.0288739 0.00526452 0.0153549) inertia_xx=7.391952e-5
        inertia_yy=0.0001372582 inertia_zz=0.0001372582 meshes=l_bofoot.vtp
      CustomJoint mtp_l: parent_body=calcn_l location_in_parent=(0.1492097 -0.001754841 -0.0009476144) location=(0 0 0)
        Coordinate mtp_angle_l: motion_type=rotational default_value=0 range=(-1.570796 1.570796) clamped=true
        SpatialTransform: axes_held_at_zero=(rotation2 rotation3 translation1 translation2 translation3)
          TransformAxis rotation1: coordinates=mtp_angle_l axis=(0.5809544 0 0.8139361)
              LinearFunction(coefficients=1 0)
    Body torso: mass=25.75781 mass_center=(-0.0349193 0.309569 0) inertia_xx=1.441312 inertia_yy=0.9115864
        inertia_zz=1.441312 meshes=(hat_spine.vtp hat_jaw.vtp hat_skull.vtp hat_ribs_scap.vtp)
      CustomJoint back: parent_body=pelvis location_in_parent=(-0.08885709 0.07191512 0) location=(0 0 0)
        Coordinate lumbar_extension: motion_type=rotational default_value=0 range=(-1.570796 1.570796) clamped=true
        Coordinate lumbar_bending: motion_type=rotational default_value=0 range=(-1.570796 1.570796) clamped=true
        Coordinate lumbar_rotation: motion_type=rotational default_value=0 range=(-1.570796 1.570796) clamped=true
        SpatialTransform: axes_held_at_zero=(translation1 translation2 translation3)
          TransformAxis rotation1: coordinates=lumbar_extension axis=(0 0 1) LinearFunction(coefficients=1 0)
          TransformAxis rotation2: coordinates=lumbar_bending axis=(1 0 0) LinearFunction(coefficients=1 0)
          TransformAxis rotation3: coordinates=lumbar_rotation axis=(0 1 0) LinearFunction(coefficients=1 0)
    Body humerus_r: mass=1.951524 mass_center=(0 -0.196583 0) inertia_xx=0.01498284 inertia_yy=0.002856057
        inertia_zz=0.01498284 meshes=humerus_rv.vtp
      CustomJoint acromial_r: parent_body=torso location_in_parent=(0.003672347 0.3593898 0.1835374) location=(0 0 0)
        Coordinate arm_flex_r: motion_type=rotational default_value=0 range=(-2 2) clamped=true
        Coordinate arm_add_r: motion_type=rotational default_value=0 range=(-2.094395 1.570796) clamped=true
        Coordinate arm_rot_r: motion_type=rotational default_value=0 range=(-1.570796 1.570796) clamped=true
        SpatialTransform: axes_held_at_zero=(translation1 translation2 translation3)
          TransformAxis rotation1: coordinates=arm_flex_r axis=(0 0 1) LinearFunction(coefficients=1 0)
          TransformAxis rotation2: coordinates=arm_add_r axis=(1 0 0) LinearFunction(coefficients=1 0)
          TransformAxis rotation3: coordinates=arm_rot_r axis=(0 1 0) LinearFunction(coefficients=1 0)
    Body ulna_r: mass=0.5832969 mass_center=(0 -0.128765 0) inertia_xx=0.003077227 inertia_yy=0.0003394079
        inertia_zz=0.003077227 meshes=ulna_rv.vtp
      CustomJoint elbow_r: parent_body=humerus_r location_in_parent=(0.01116704 -0.3421025 -0.008151836)
          location=(0 0 0)
        Coordinate elbow_flex_r: motion_type=rotational default_value=0 range=(0 2.618) clamped=true
        SpatialTransform: axes_held_at_zero=(rotation2 rotation3 translation1 translation2 translation3)
          TransformAxis rotation1: coordinates=elbow_flex_r axis=(0.226047 0.022269 0.9738618)
              LinearFunction(coefficients=1 0)
    Body radius_r: mass=0.5832969 mass_center=(0 -0.128765 0) inertia_xx=0.003077227 inertia_yy=0.0003394079
        inertia_zz=0.003077227 meshes=radius_rv.vtp
      CustomJoint radioulnar_r: parent_body=ulna_r location_in_parent=(-0.005087641 -0.01389628 0.01972662)
          location=(0 0 0)
        Coordinate pro_sup_r: motion_type=rotational default_value=0 range=(0 1.570796) clamped=true
        SpatialTransform: axes_held_at_zero=(rotation2 rotation3 translation1 translation2 translation3)
          TransformAxis rotation1: coordinates=pro_sup_r axis=(0.05639803 0.9984065 0.001952)
              LinearFunction(coefficients=1 0)
    Body hand_r: mass=0.4392729 mass_center=(0 -0.0698108 0) inertia_xx=0.0009001675 inertia_yy=0.0005520085
        inertia_zz=0.00135227
        meshes=(pisiform_rvs.vtp lunate_rvs.vtp scaphoid_rvs.vtp triquetrum_rvs.vtp hamate_rvs.vtp capitate_rvs.vtp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)
      CustomJoint radius_hand_r: parent_body=radius_r location_in_parent=(-0.006653185 -0.2519652 0.01029327)
          location=(0 0 0)
        Coordinate wrist_flex_r: motion_type=rotational default_value=0 range=(-1.22173 1.22173) clamped=true
        Coordinate wrist_dev_r: motion_type=rotational default_value=0 range=(-1 1) clamped=true
        SpatialTransform: axes_held_at_zero=(rotation3 translation1 translation2 translation3)
          TransformAxis rotation1: coordinates=wrist_flex_r axis=(0 0 1) LinearFunction(coefficients=1 0)
          TransformAxis rotation2: coordinates=wrist_dev_r axis=(1 0 0) LinearFunction(coefficients=1 0)
    Body humerus_l: mass=1.951524 mass_center=(0 -0.196583 0) inertia_xx=0.01498284 inertia_yy=0.002856057
        inertia_zz=0.01498284 meshes=humerus_lv.vtp
      CustomJoint acromial_l: parent_body=torso location_in_parent=(0.003672347 0.3593898 -0.1835374) location=(0 0 0)
        Coordinate arm_flex_l: motion_type=rotational default_value=0 range=(-2 2) clamped=true
        Coordinate arm_add_l: motion_type=rotational default_value=0 range=(-2.094395 1.570796) clamped=true
        Coordinate arm_rot_l: motion_type=rotational default_value=0 range=(-1.570796 1.570796) clamped=true
        SpatialTransform: axes_held_at_zero=(translation1 translation2 translation3)
          TransformAxis rotation1: coordinates=arm_flex_l axis=(0 0 1) LinearFunction(coefficients=1 0)
          TransformAxis rotation2: coordinates=arm_add_l axis=(-1 0 0) LinearFunction(coefficients=1 0)
          TransformAxis rotation3: coordinates=arm_rot_l axis=(0 -1 0) LinearFunction(coefficients=1 0)
    Body ulna_l: mass=0.5832969 mass_center=(0 -0.128765 0) inertia_xx=0.003077227 inertia_yy=0.0003394079
        inertia_zz=0.003077227 meshes=ulna_lv.vtp
      CustomJoint elbow_l: parent_body=humerus_l location_in_parent=(0.01116704 -0.3421025 0.008151836)
          location=(0 0 0)
        Coordinate elbow_flex_l: motion_type=rotational default_value=0 range=(0 2.618) clamped=true
        SpatialTransform: axes_held_at_zero=(rotation2 rotation3 translation1 translation2 translation3)
          TransformAxis rotation1: coordinates=elbow_flex_l axis=(-0.226047 -0.022269 0.9738618)
              LinearFunction(coefficients=1 0)
    Body radius_l: mass=0.5832969 mass_center=(0 -0.128765 0) inertia_xx=0.003077227 inertia_yy=0.0003394079
        inertia_zz=0.003077227 meshes=radius_lv.vtp
      CustomJoint radioulnar_l: parent_body=ulna_l location_in_parent=(-0.005087641 -0.01389628 -0.01972662)
          location=(0 0 0)
        Coordinate pro_sup_l: motion_type=rotational default_value=0 range=(0 1.570796) clamped=true
        SpatialTransform: axes_held_at_zero=(rotation2 rotation3 translation1 translation2 translation3)
          TransformAxis rotation1: coordinates=pro_sup_l axis=(-0.05639803 -0.9984065 0.001952)
              LinearFunction(coefficients=1 0)
    Body hand_l: mass=0.4392729 mass_center=(0 -0.0698108 0) inertia_xx=0.0009001675 inertia_yy=0.0005520085
        inertia_zz=0.00135227
        meshes=(pisiform_lvs.vtp lunate_lvs.vtp scaphoid_lvs.vtp triquetrum_lvs.vtp hamate_lvs.vtp capitate_lvs.vtp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)
      CustomJoint radius_hand_l: parent_body=radius_l location_in_parent=(-0.006653185 -0.2519652 -0.01029327)
          location=(0 0 0)
        Coordinate wrist_flex_l: motion_type=rotational default_value=0 range=(-1.22173 1.22173) clamped=true
        Coordinate wrist_dev_l: motion_type=rotational default_value=0 range=(-1 1) clamped=true
        SpatialTransform: axes_held_at_zero=(rotation3 translation1 translation2 translation3)
          TransformAxis rotation1: coordinates=wrist_flex_l axis=(0 0 1) LinearFunction(coefficients=1 0)
          TransformAxis rotation2: coordinates=wrist_dev_l axis=(-1 0 0) LinearFunction(coefficients=1 0)
  ForceSet:
    Thelen2003Muscle [values shared by the 92 below unless stated]: activation_time_constant=0.01
        deactivation_time_constant=0.04 FmaxTendonStrain=0.033 FmaxMuscleStrain=0.6 KshapeActive=0.5 KshapePassive=4
        Af=0.3 Flen=1.8
    Thelen2003Muscle glut_med1_r: max_isometric_force=819 optimal_fiber_length=0.04790465
        tendon_slack_length=0.06984229 pennation_angle_at_optimal=0.1396263 [radians]
      PathPoint P1: pelvis (-0.0360017 0.0268248 0.105465)
      PathPoint P2: femur_r (-0.0187011 -0.0124962 0.0476106)
    Thelen2003Muscle glut_med2_r: max_isometric_force=573 optimal_fiber_length=0.0747538 tendon_slack_length=0.046887
        pennation_angle_at_optimal=0
      PathPoint P1: pelvis (-0.0754447 0.0392665 0.0668208)
      PathPoint P2: femur_r (-0.0221325 -0.00619469 0.0452086)
    Thelen2003Muscle glut_med3_r: max_isometric_force=653 optimal_fiber_length=0.05692571
        tendon_slack_length=0.04670376 pennation_angle_at_optimal=0.3316126
      PathPoint P1: pelvis (-0.107917 0.00926514 0.0565272)
      PathPoint P2: femur_r (-0.0265075 -0.00501984 0.0444366)
    Thelen2003Muscle glut_min1_r: max_isometric_force=270 optimal_fiber_length=0.06089982
        tendon_slack_length=0.01432937 pennation_angle_at_optimal=0.1745329
      PathPoint P1: pelvis (-0.0412078 -0.00705915 0.0921185)
      PathPoint P2: femur_r (-0.00617651 -0.0111077 0.0480395)
    Thelen2003Muscle glut_min2_r: max_isometric_force=285 optimal_fiber_length=0.05010659
        tendon_slack_length=0.02326378 pennation_angle_at_optimal=0
      PathPoint P1: pelvis (-0.0558556 -0.00573556 0.0864483)
      PathPoint P2: femur_r (-0.00823535 -0.0111077 0.0480395)
    Thelen2003Muscle glut_min3_r: max_isometric_force=323 optimal_fiber_length=0.03371841
        tendon_slack_length=0.04525366 pennation_angle_at_optimal=0.01745329
      PathPoint P1: pelvis (-0.0735917 -0.00555908 0.0746718)
      PathPoint P2: femur_r (-0.011581 -0.00886482 0.0471817)
    Thelen2003Muscle semimem_r: max_isometric_force=1288 optimal_fiber_length=0.08684036 tendon_slack_length=0.3896961
        pennation_angle_at_optimal=0.2617994
      PathPoint P1: pelvis (-0.105181 -0.086007 0.0623806)
      ConditionalPathPoint P2: tibia_r (-0.0286422 -0.0393734 -0.0155639) range=(-0.558505 0.174533)
          coordinate=knee_angle_r
      PathPoint P3: tibia_r (-0.0222224 -0.0533817 -0.0161071)
    Thelen2003Muscle semiten_r: max_isometric_force=410 optimal_fiber_length=0.2174664 tendon_slack_length=0.2764312
        pennation_angle_at_optimal=0.08726646
      PathPoint P1: pelvis (-0.111491 -0.0969575 0.0526803)
      ConditionalPathPoint P2: tibia_r (-0.0345929 -0.0319888 -0.0187409) range=(-0.331613 0.174533)
          coordinate=knee_angle_r
      PathPoint P3: tibia_r (-0.0273418 -0.0590992 -0.0188314)
      PathPoint P4: tibia_r (-0.00930049 -0.0834684 -0.0201648)
      PathPoint P5: tibia_r (0.00222224 -0.106965 -0.0158849)
    Thelen2003Muscle bifemlh_r: max_isometric_force=896 optimal_fiber_length=0.1184379 tendon_slack_length=0.3542272
        pennation_angle_at_optimal=0
      PathPoint P1: pelvis (-0.111146 -0.0905072 0.0605749)
      PathPoint P2: tibia_r (-0.0247739 -0.0402797 0.0242224)
      PathPoint P3: tibia_r (-0.0192594 -0.0629929 0.0282307)
    Thelen2003Muscle bifemsh_r: max_isometric_force=804 optimal_fiber_length=0.1851823 tendon_slack_length=0.09526722
        pennation_angle_at_optimal=0.4014257
      PathPoint P1: femur_r (0.00428924 -0.225465 0.0200737)
      PathPoint P2: tibia_r (-0.0247739 -0.0402797 0.0242224)
      PathPoint P3: tibia_r (-0.0192594 -0.0629929 0.0282307)
    Thelen2003Muscle sar_r: max_isometric_force=156 optimal_fiber_length=0.5397349 tendon_slack_length=0.1037952
        pennation_angle_at_optimal=0
      PathPoint P1: pelvis (-0.0135006 -0.00114711 0.108344)
      PathPoint P2: femur_r (-0.00257355 -0.38108 -0.0361154)
      PathPoint P3: tibia_r (-0.00460909 -0.046881 -0.0328398)
      PathPoint P4: tibia_r (0.00493831 -0.065902 -0.0315229)
      PathPoint P5: tibia_r (0.0200002 -0.0939859 -0.0207409)
    Thelen2003Muscle add_long_r: max_isometric_force=627 optimal_fiber_length=0.1443343 tendon_slack_length=0.1150491
        pennation_angle_at_optimal=0.1047198
      PathPoint P1: pelvis (-0.0278837 -0.0737682 0.0147424)
      PathPoint P2: femur_r (0.00428924 -0.225465 0.0200737)
    Thelen2003Muscle add_brev_r: max_isometric_force=429 optimal_fiber_length=0.1326204 tendon_slack_length=0.01994291
        pennation_angle_at_optimal=0
      PathPoint P1: pelvis (-0.0517965 -0.0807391 0.0143063)
      PathPoint P2: femur_r (0.000772064 -0.127739 0.0252207)
    Thelen2003Muscle add_mag1_r: max_isometric_force=381 optimal_fiber_length=0.08731901 tendon_slack_length=0.06022001
        pennation_angle_at_optimal=0.08726646
      PathPoint P1: pelvis (-0.0645913 -0.103593 0.0222445)
      PathPoint P2: femur_r (-0.00386032 -0.129341 0.0290811)
    Thelen2003Muscle add_mag2_r: max_isometric_force=343 optimal_fiber_length=0.131479 tendon_slack_length=0.1303924
        pennation_angle_at_optimal=0.05235988
      PathPoint P1: pelvis (-0.073327 -0.105181 0.0268679)
      PathPoint P2: femur_r (0.00463238 -0.24405 0.0194732)
    Thelen2003Muscle add_mag3_r: max_isometric_force=488 optimal_fiber_length=0.1428841 tendon_slack_length=0.271589
        pennation_angle_at_optimal=0.08726646
      PathPoint P1: pelvis (-0.0980163 -0.100708 0.0425873)
      PathPoint P2: femur_r (0.00600494 -0.409811 -0.0228188)
    Thelen2003Muscle tfl_r: max_isometric_force=233 optimal_fiber_length=0.09880501 tendon_slack_length=0.4420224
        pennation_angle_at_optimal=0.05235988
      PathPoint P1: pelvis (-0.0274425 0.0188832 0.108257)
      PathPoint P2: femur_r (0.0252207 -0.106271 0.0512136)
      PathPoint P3: femur_r (0.00463238 -0.432454 0.0306252)
      PathPoint P4: tibia_r (0.00493831 -0.0544894 0.0244446)
    Thelen2003Muscle pect_r: max_isometric_force=266 optimal_fiber_length=0.09833403 tendon_slack_length=0.03245023
        pennation_angle_at_optimal=0
      PathPoint P1: pelvis (-0.0380312 -0.0677679 0.0393423)
      PathPoint P2: femur_r (-0.0104658 -0.0877937 0.0217036)
    Thelen2003Muscle grac_r: max_isometric_force=162 optimal_fiber_length=0.3825507 tendon_slack_length=0.1369358
        pennation_angle_at_optimal=0.05235988
      PathPoint P1: pelvis (-0.065306 -0.10474 0.024373)
      ConditionalPathPoint P2: tibia_r (-0.0218685 -0.0356922 -0.031062) range=(-0.436332 0.174533)
          coordinate=knee_angle_r
      PathPoint P3: tibia_r (-0.0159919 -0.0576558 -0.0294653)
      PathPoint P4: tibia_r (0.00493831 -0.0935383 -0.0187656)
    Thelen2003Muscle glut_max1_r: max_isometric_force=573 optimal_fiber_length=0.1317114 tendon_slack_length=0.1159431
        pennation_angle_at_optimal=0.08726646
      PathPoint P1: pelvis (-0.105446 0.0540025 0.0610634)
      PathPoint P2: pelvis (-0.113917 0.00105887 0.0772888)
      PathPoint P3: femur_r (-0.0392037 -0.0264877 0.0336277)
      PathPoint P4: femur_r (-0.0237624 -0.0604517 0.0403189)
    Thelen2003Muscle glut_max2_r: max_isometric_force=819 optimal_fiber_length=0.1413112 tendon_slack_length=0.1220852
        pennation_angle_at_optimal=0
      PathPoint P1: pelvis (-0.119035 0.0155301 0.0491124)
      PathPoint P2: pelvis (-0.121417 -0.0458845 0.0797313)
      PathPoint P3: femur_r (-0.0365444 -0.0566067 0.025135)
      PathPoint P4: femur_r (-0.0133824 -0.108514 0.0359439)
    Thelen2003Muscle glut_max3_r: max_isometric_force=552 optimal_fiber_length=0.1381372 tendon_slack_length=0.1390964
        pennation_angle_at_optimal=0.08726646
      PathPoint P1: pelvis (-0.137301 -0.0277072 0.00505954)
      PathPoint P2: pelvis (-0.134918 -0.0928279 0.0351551)
      PathPoint P3: femur_r (-0.0256497 -0.111184 0.011581)
      PathPoint P4: femur_r (-0.00514709 -0.151556 0.0352576)
    Thelen2003Muscle iliacus_r: max_isometric_force=1073 optimal_fiber_length=0.09187246 tendon_slack_length=0.09187246
        pennation_angle_at_optimal=0.1221731
      PathPoint P1: pelvis (-0.0594734 0.0322074 0.0744973)
      PathPoint P2: pelvis (-0.0227658 -0.0485317 0.0707463)
      ConditionalPathPoint P3: pelvis (-0.025413 -0.0710327 0.0711825) range=(-1.5708 0.785398)
          coordinate=hip_flexion_r
      PathPoint P4: femur_r (0.00145834 -0.0579951 0.00488974)
      PathPoint P5: femur_r (-0.0165565 -0.0663259 0.0110662)
    Thelen2003Muscle psoas_r: max_isometric_force=1113 optimal_fiber_length=0.09085087 tendon_slack_length=0.1453614
        pennation_angle_at_optimal=0.1396263
      PathPoint P1: pelvis (-0.0570909 0.0782684 0.0252105)
      PathPoint P2: pelvis (-0.021001 -0.0502965 0.0662102)
      ConditionalPathPoint P3: pelvis (-0.025413 -0.0710327 0.0711825) range=(-1.5708 0.785398)
          coordinate=hip_flexion_r
      PathPoint P4: femur_r (0.00137256 -0.0541502 0.00325982)
      PathPoint P5: femur_r (-0.0161276 -0.0637626 0.00892163)
    Thelen2003Muscle quad_fem_r: max_isometric_force=381 optimal_fiber_length=0.04607884 tendon_slack_length=0.02047948
        pennation_angle_at_optimal=0
      PathPoint P1: pelvis (-0.100858 -0.101564 0.0453614)
      PathPoint P2: femur_r (-0.032684 -0.038343 0.0313973)
    Thelen2003Muscle gem_r: max_isometric_force=164 optimal_fiber_length=0.02079838 tendon_slack_length=0.03379737
        pennation_angle_at_optimal=0
      PathPoint P1: pelvis (-0.0999753 -0.0723563 0.0622847)
      PathPoint P2: femur_r (-0.0121815 -0.00352457 0.0380027)
    Thelen2003Muscle peri_r: max_isometric_force=444 optimal_fiber_length=0.0227971 tendon_slack_length=0.1008333
        pennation_angle_at_optimal=0.1745329
      PathPoint P1: pelvis (-0.123182 0.000264718 0.0204999)
      PathPoint P2: pelvis (-0.10527 -0.0243541 0.0573123)
      PathPoint P3: femur_r (-0.0126962 -0.00384498 0.037488)
    Thelen2003Muscle rect_fem_r: max_isometric_force=1169 optimal_fiber_length=0.1195832 tendon_slack_length=0.3251824
        pennation_angle_at_optimal=0.08726646
      PathPoint P1: pelvis (-0.0260306 -0.0274425 0.0844419)
      ConditionalPathPoint P2: femur_r (0.0286521 -0.430424 0.00162991) range=(-2.61799 -1.45997)
          coordinate=knee_angle_r
      MovingPathPoint P3: tibia_r (0.0508297 0.0234786 0.00115227) x_coordinate=knee_angle_r y_coordinate=knee_angle_r
          z_coordinate=knee_angle_r
        x_location: MultiplierFunction: scale=0.8230521
          SimmSpline: x=(-2.0944 -1.99997 -1.5708 -1.45752 -1.39626 -1.0472 -0.698132 -0.526391 -0.349066 -0.174533 0 0.00017453 0.00034907 0.0279253 0.0872665 0.174533 2.0944)
              y=(0.0155805 0.0179938 0.0275081 0.0296564 0.0307615 0.0365695 0.0422074 0.0450902 0.048391 0.0534299 0.0617576 0.0617669 0.0617762 0.0633083 0.066994 0.0733035 0.0573481)
        y_location: MultiplierFunction: scale=1.118879
          SimmSpline: x=(-2.0944 -1.99997 -1.5708 -1.45752 -1.39626 -1.0472 -0.698132 -0.526391 -0.349066 -0.174533 0 0.00017453 0.00034907 0.0279253 0.0872665 0.174533 2.0944)
              y=(0.0234116 0.0237613 0.0251141 0.0252795 0.0253146 0.0249184 0.0242373 0.0238447 0.0234197 0.0227644 0.020984 0.0209814 0.0209788 0.0205225 0.0191754 0.0159554 -0.0673774)
        z_location: MultiplierFunction: scale=0.8230521
          SimmSpline: x=(-2.0944 0.1745) y=(0.0014 0.0014)
    Thelen2003Muscle vas_med_r: max_isometric_force=1294 optimal_fiber_length=0.09277826 tendon_slack_length=0.131349
        pennation_angle_at_optimal=0.08726646
      PathPoint P1: femur_r (0.0120099 -0.224184 0.0161276)
      PathPoint P2: femur_r (0.0305394 -0.295743 0.000772064)
      ConditionalPathPoint P3: femur_r (0.0317404 -0.432347 -0.0107231) range=(-2.61799 -1.21004)
          coordinate=knee_angle_r
      ConditionalPathPoint P4: femur_r (0.0235051 -0.454455 -0.0112378) range=(-2.61799 -1.78006)
          coordinate=knee_angle_r
      MovingPathPoint P5: tibia_r (0.0460568 0.0243823 -0.0120166) x_coordinate=knee_angle_r y_coordinate=knee_angle_r
          z_coordinate=knee_angle_r
        x_location: MultiplierFunction: scale=0.8230521
          SimmSpline: x=(-2.0944 -1.99997 -1.5708 -1.45752 -1.39626 -1.0472 -0.698132 -0.526391 -0.349066 -0.174533 0 0.00017453 0.00034907 0.0279253 0.0872665 0.174533 2.0944)
              y=(0.00981097 0.0122243 0.0217371 0.0238851 0.0249902 0.0307959 0.0364187 0.0392871 0.0425654 0.0475764 0.0559586 0.0559681 0.0559776 0.0575419 0.0613368 0.0679503 0.0629332)
        y_location: MultiplierFunction: scale=1.118879
          SimmSpline: x=(-2.0944 -1.99997 -1.5708 -1.45752 -1.39626 -1.0472 -0.698132 -0.526391 -0.349066 -0.174533 0 0.00017453 0.00034907 0.0279253 0.0872665 0.174533 2.0944)
              y=(0.0224154 0.0227651 0.0241265 0.0242933 0.0243287 0.0239462 0.0233593 0.0230677 0.0228342 0.0226362 0.0217917 0.0217903 0.0217889 0.0215365 0.0206842 0.0183269 -0.0656205)
        z_location: MultiplierFunction: scale=0.8230521
          SimmSpline: x=(-2.0944 2.0944) y=(-0.0146 -0.0146)
    Thelen2003Muscle vas_int_r: max_isometric_force=1365 optimal_fiber_length=0.09153945 tendon_slack_length=0.1430962
        pennation_angle_at_optimal=0.05235988
      PathPoint P1: femur_r (0.0248776 -0.205493 0.0265933)
      PathPoint P2: femur_r (0.0287379 -0.222582 0.0244487)
      ConditionalPathPoint P3: femur_r (0.0294242 -0.430424 0.00471817) range=(-2.61799 -1.42) coordinate=knee_angle_r
      MovingPathPoint P4: tibia_r (0.0456491 0.028299 0.00148149) x_coordinate=knee_angle_r y_coordinate=knee_angle_r
          z_coordinate=knee_angle_r
        x_location: MultiplierFunction: scale=0.8230521
          SimmSpline: x=(-2.0944 -1.99997 -1.5708 -1.45752 -1.39626 -1.0472 -0.698132 -0.526391 -0.349066 -0.174533 0 0.00017453 0.00034907 0.0279253 0.0872665 0.174533 2.0944)
              y=(0.0082733 0.0106866 0.0202042 0.022353 0.0234583 0.0292715 0.0349465 0.037871 0.0412569 0.0465287 0.0554632 0.0554735 0.0554837 0.0571717 0.061272 0.0684368 0.0648818)
        y_location: MultiplierFunction: scale=1.118879
          SimmSpline: x=(-2.0944 -1.99997 -1.5708 -1.45752 -1.39626 -1.0472 -0.698132 -0.526391 -0.349066 -0.174533 0 0.00017453 0.00034907 0.0279253 0.0872665 0.174533 2.0944)
              y=(0.025599 0.0259487 0.0273124 0.0274796 0.0275151 0.0271363 0.0265737 0.0263073 0.0261187 0.0260129 0.0252923 0.0252911 0.0252898 0.0250526 0.0242191 0.0218288 -0.0685706)
        z_location: MultiplierFunction: scale=0.8230521
          SimmSpline: x=(-2.0944 2.0944) y=(0.0018 0.0018)
    Thelen2003Muscle vas_lat_r: max_isometric_force=1871 optimal_fiber_length=0.08772702 tendon_slack_length=0.163966
        pennation_angle_at_optimal=0.08726646
      PathPoint P1: femur_r (0.00411767 -0.198017 0.0299389)
      PathPoint P2: femur_r (0.0230761 -0.276732 0.035086)
      ConditionalPathPoint P3: femur_r (0.0309683 -0.430424 0.0175859) range=(-2.61799 -1.21004)
          coordinate=knee_angle_r
      ConditionalPathPoint P4: femur_r (0.0217036 -0.453174 0.0157844) range=(-2.61799 -1.92004)
          coordinate=knee_angle_r
      MovingPathPoint P5: tibia_r (0.0493467 0.0219148 0.0135804) x_coordinate=knee_angle_r y_coordinate=knee_angle_r
          z_coordinate=knee_angle_r
        x_location: MultiplierFunction: scale=0.8230521
          SimmSpline: x=(-2.0944 -1.99997 -1.5708 -1.45752 -1.39626 -1.0472 -0.698132 -0.526391 -0.349066 -0.174533 0 0.00017453 0.00034907 0.0279253 0.0872665 0.174533 2.0944)
              y=(0.0142897 0.016703 0.0262145 0.0283623 0.0294674 0.0352709 0.0408785 0.0437291 0.0469704 0.0518742 0.0599557 0.0599647 0.0599738 0.0614577 0.0650351 0.0711867 0.0583766)
        y_location: MultiplierFunction: scale=1.118879
          SimmSpline: x=(-2.0944 -1.99997 -1.5708 -1.45752 -1.39626 -1.0472 -0.698132 -0.526391 -0.349066 -0.174533 0 0.00017453 0.00034907 0.0279253 0.0872665 0.174533 2.0944)
              y=(0.0215318 0.0218815 0.0232362 0.0234019 0.0234371 0.0230439 0.0223842 0.0220151 0.0216359 0.0210971 0.0195864 0.0195842 0.019582 0.01919 0.018008 0.0151073 -0.0653421)
        z_location: MultiplierFunction: scale=0.8230521
          SimmSpline: x=(-2.0944 2.0944) y=(0.0165 0.0165)
    Thelen2003Muscle med_gas_r: max_isometric_force=1558 optimal_fiber_length=0.06639381 tendon_slack_length=0.4315598
        pennation_angle_at_optimal=0.296706
      PathPoint P1: femur_r (-0.0162991 -0.419637 -0.0201594)
      ConditionalPathPoint P2: femur_r (-0.0257355 -0.42957 -0.0221325) range=(-0.785398 0.174533)
          coordinate=knee_angle_r
      PathPoint P3: calcn_r (0 0.0272 -0.00465033)
    Thelen2003Muscle lat_gas_r: max_isometric_force=683 optimal_fiber_length=0.07093103 tendon_slack_length=0.421153
        pennation_angle_at_optimal=0.1396263
      PathPoint P1: femur_r (-0.0188727 -0.421453 0.0233335)
      ConditionalPathPoint P2: femur_r (-0.0257355 -0.429143 0.0235051) range=(-0.785398 0.174533)
          coordinate=knee_angle_r
      PathPoint P3: calcn_r (0 0.0272 -0.00465033)
    Thelen2003Muscle soleus_r: max_isometric_force=3549 optimal_fiber_length=0.05517565 tendon_slack_length=0.2758783
        pennation_angle_at_optimal=0.4363323
      PathPoint P1: tibia_r (-0.00197533 -0.171524 0.00584367)
      PathPoint P2: calcn_r (0 0.0272 -0.00465033)
    Thelen2003Muscle tib_post_r: max_isometric_force=1588 optimal_fiber_length=0.03342404 tendon_slack_length=0.3342404
        pennation_angle_at_optimal=0.2094395
      PathPoint P1: tibia_r (-0.00773669 -0.150825 0.0015638)
      PathPoint P2: tibia_r (-0.011852 -0.453258 -0.0188479)
      PathPoint P3: calcn_r (0.0347989 0.0293059 -0.0250942)
      PathPoint P4: calcn_r (0.0644239 0.013951 -0.0246555)
    Thelen2003Muscle flex_dig_r: max_isometric_force=310 optimal_fiber_length=0.03350529 tendon_slack_length=0.3941799
        pennation_angle_at_optimal=0.1221731
      PathPoint P1: tibia_r (-0.00683133 -0.228923 -0.00148149)
      PathPoint P2: tibia_r (-0.012675 -0.453258 -0.0161318)
      PathPoint P3: calcn_r (0.0363845 0.0276388 -0.0245678)
      PathPoint P4: calcn_r (0.0590831 0.0154426 -0.0230762)
      PathPoint P5: calcn_r (0.138361 -0.00710711 0.0101781)
      PathPoint P6: toes_r (-0.00158556 -0.00684388 0.0128981)
      PathPoint P7: toes_r (0.0237834 -0.00622969 0.0188645)
      PathPoint P8: toes_r (0.0368017 -0.00526452 0.0212336)
    Thelen2003Muscle flex_hal_r: max_isometric_force=322 optimal_fiber_length=0.04158134 tendon_slack_length=0.367463
        pennation_angle_at_optimal=0.1745329
      PathPoint P1: tibia_r (-0.00650211 -0.261146 0.0200825)
      PathPoint P2: tibia_r (-0.0153088 -0.456391 -0.0143211)
      PathPoint P3: calcn_r (0.0312105 0.0242168 -0.0211458)
      PathPoint P4: calcn_r (0.0866218 0.00596646 -0.022462)
      PathPoint P5: calcn_r (0.144036 -0.00465033 -0.0236026)
      PathPoint P6: toes_r (0.0129348 -0.00561549 -0.0232516)
      PathPoint P7: toes_r (0.0468993 -0.00894969 -0.0158813)
    Thelen2003Muscle tib_ant_r: max_isometric_force=905 optimal_fiber_length=0.1061509 tendon_slack_length=0.2415475
        pennation_angle_at_optimal=0.08726646
      PathPoint P1: tibia_r (0.0147326 -0.181706 0.0094651)
      PathPoint P2: tibia_r (0.0270784 -0.442069 -0.014568)
      PathPoint P3: calcn_r (0.0973034 0.0156181 -0.0267613)
    Thelen2003Muscle per_brev_r: max_isometric_force=435 optimal_fiber_length=0.05299912 tendon_slack_length=0.1706572
        pennation_angle_at_optimal=0.08726646
      PathPoint P1: tibia_r (-0.00576137 -0.296055 0.0267492)
      PathPoint P2: tibia_r (-0.0162964 -0.468139 0.0232924)
      PathPoint P3: tibia_r (-0.011852 -0.480559 0.0237862)
      PathPoint P4: calcn_r (0.0393053 0.0236904 0.0204439)
      PathPoint P5: calcn_r (0.0564961 0.0192155 0.0300955)
    Thelen2003Muscle per_long_r: max_isometric_force=943 optimal_fiber_length=0.05076942 tendon_slack_length=0.3574582
        pennation_angle_at_optimal=0.1745329
      PathPoint P1: tibia_r (0.000411526 -0.17544 0.0297945)
      PathPoint P2: tibia_r (-0.0170372 -0.470489 0.0235393)
      PathPoint P3: tibia_r (-0.0133334 -0.483244 0.0237862)
      PathPoint P4: calcn_r (0.0365514 0.0201807 0.019391)
      PathPoint P5: calcn_r (0.0568299 0.00930066 0.0249187)
      PathPoint P6: calcn_r (0.0710999 0.0060542 0.0103536)
      PathPoint P7: calcn_r (0.100391 0.00745808 -0.0161445)
    Thelen2003Muscle per_tert_r: max_isometric_force=180 optimal_fiber_length=0.0848699 tendon_slack_length=0.1074303
        pennation_angle_at_optimal=0.2268928
      PathPoint P1: tibia_r (0.000823052 -0.313734 0.0190125)
      PathPoint P2: tibia_r (0.0188479 -0.455272 0.0130865)
      PathPoint P3: calcn_r (0.0715172 0.0200052 0.0262349)
    Thelen2003Muscle ext_dig_r: max_isometric_force=512 optimal_fiber_length=0.1043097 tendon_slack_length=0.3528123
        pennation_angle_at_optimal=0.1396263
      PathPoint P1: tibia_r (0.00263377 -0.154517 0.0227162)
      PathPoint P2: tibia_r (0.0237862 -0.448335 0.00592598)
      PathPoint P3: calcn_r (0.0769415 0.0340439 -8.77421e-5)
      PathPoint P4: calcn_r (0.134856 0.00482581 0.0114065)
      PathPoint P5: toes_r (0.000250352 0.00412388 0.0134245)
      PathPoint P6: toes_r (0.0369686 -0.000350968 0.0219355)
    Thelen2003Muscle ext_hal_r: max_isometric_force=162 optimal_fiber_length=0.1119414 tendon_slack_length=0.3075869
        pennation_angle_at_optimal=0.1047198
      PathPoint P1: tibia_r (0.000987663 -0.197706 0.0187656)
      PathPoint P2: tibia_r (0.0268315 -0.445873 -0.00699594)
      PathPoint P3: calcn_r (0.0809471 0.0341317 -0.0185136)
      PathPoint P4: calcn_r (0.107902 0.0271123 -0.0225497)
      PathPoint P5: calcn_r (0.144703 0.0121961 -0.0245678)
      PathPoint P6: toes_r (0.0248683 0.00359742 -0.0214968)
      PathPoint P7: toes_r (0.0469827 0.00298323 -0.01632)
    Thelen2003Muscle glut_med1_l: max_isometric_force=819 optimal_fiber_length=0.04790465
        tendon_slack_length=0.06984229 pennation_angle_at_optimal=0.1396263
      PathPoint P1: pelvis (-0.0360017 0.0268248 -0.105465)
      PathPoint P2: femur_l (-0.0187011 -0.0124962 -0.0476106)
    Thelen2003Muscle glut_med2_l: max_isometric_force=573 optimal_fiber_length=0.0747538 tendon_slack_length=0.046887
        pennation_angle_at_optimal=0
      PathPoint P1: pelvis (-0.0754447 0.0392665 -0.0668208)
      PathPoint P2: femur_l (-0.0221325 -0.00619469 -0.0452086)
    Thelen2003Muscle glut_med3_l: max_isometric_force=653 optimal_fiber_length=0.05692571
        tendon_slack_length=0.04670376 pennation_angle_at_optimal=0.3316126
      PathPoint P1: pelvis (-0.107917 0.00926514 -0.0565272)
      PathPoint P2: femur_l (-0.0265075 -0.00501984 -0.0444366)
    Thelen2003Muscle glut_min1_l: max_isometric_force=270 optimal_fiber_length=0.06089982
        tendon_slack_length=0.01432937 pennation_angle_at_optimal=0.1745329
      PathPoint P1: pelvis (-0.0412078 -0.00705915 -0.0921185)
      PathPoint P2: femur_l (-0.00617651 -0.0111077 -0.0480395)
    Thelen2003Muscle glut_min2_l: max_isometric_force=285 optimal_fiber_length=0.05010659
        tendon_slack_length=0.02326378 pennation_angle_at_optimal=0
      PathPoint P1: pelvis (-0.0558556 -0.00573556 -0.0864483)
      PathPoint P2: femur_l (-0.00823535 -0.0111077 -0.0480395)
    Thelen2003Muscle glut_min3_l: max_isometric_force=323 optimal_fiber_length=0.03371841
        tendon_slack_length=0.04525366 pennation_angle_at_optimal=0.01745329
      PathPoint P1: pelvis (-0.0735917 -0.00555908 -0.0746718)
      PathPoint P2: femur_l (-0.011581 -0.00886482 -0.0471817)
    Thelen2003Muscle semimem_l: max_isometric_force=1288 optimal_fiber_length=0.08684036 tendon_slack_length=0.3896961
        pennation_angle_at_optimal=0.2617994
      PathPoint P1: pelvis (-0.105181 -0.086007 -0.0623806)
      ConditionalPathPoint P2: tibia_l (-0.0286422 -0.0393734 0.0155639) range=(-0.558505 0.174533)
          coordinate=knee_angle_l
      PathPoint P3: tibia_l (-0.0222224 -0.0533817 0.0161071)
    Thelen2003Muscle semiten_l: max_isometric_force=410 optimal_fiber_length=0.2174664 tendon_slack_length=0.2764312
        pennation_angle_at_optimal=0.08726646
      PathPoint P1: pelvis (-0.111491 -0.0969575 -0.0526803)
      ConditionalPathPoint P2: tibia_l (-0.0345929 -0.0319888 0.0187409) range=(-0.331613 0.174533)
          coordinate=knee_angle_l
      PathPoint P3: tibia_l (-0.0273418 -0.0590992 0.0188314)
      PathPoint P4: tibia_l (-0.00930049 -0.0834684 0.0201648)
      PathPoint P5: tibia_l (0.00222224 -0.106965 0.0158849)
    Thelen2003Muscle bifemlh_l: max_isometric_force=896 optimal_fiber_length=0.1184379 tendon_slack_length=0.3542272
        pennation_angle_at_optimal=0
      PathPoint P1: pelvis (-0.111146 -0.0905072 -0.0605749)
      PathPoint P2: tibia_l (-0.0247739 -0.0402797 -0.0242224)
      PathPoint P3: tibia_l (-0.0192594 -0.0629929 -0.0282307)
    Thelen2003Muscle bifemsh_l: max_isometric_force=804 optimal_fiber_length=0.1851823 tendon_slack_length=0.09526722
        pennation_angle_at_optimal=0.4014257
      PathPoint P1: femur_l (0.00428924 -0.225465 -0.0200737)
      PathPoint P2: tibia_l (-0.0247739 -0.0402797 -0.0242224)
      PathPoint P3: tibia_l (-0.0192594 -0.0629929 -0.0282307)
    Thelen2003Muscle sar_l: max_isometric_force=156 optimal_fiber_length=0.5397349 tendon_slack_length=0.1037952
        pennation_angle_at_optimal=0
      PathPoint P1: pelvis (-0.0135006 -0.00114711 -0.108344)
      PathPoint P2: femur_l (-0.00257355 -0.38108 0.0361154)
      PathPoint P3: tibia_l (-0.00460909 -0.046881 0.0328398)
      PathPoint P4: tibia_l (0.00493831 -0.065902 0.0315229)
      PathPoint P5: tibia_l (0.0200002 -0.0939859 0.0207409)
    Thelen2003Muscle add_long_l: max_isometric_force=627 optimal_fiber_length=0.1443343 tendon_slack_length=0.1150491
        pennation_angle_at_optimal=0.1047198
      PathPoint P1: pelvis (-0.0278837 -0.0737682 -0.0147424)
      PathPoint P2: femur_l (0.00428924 -0.225465 -0.0200737)
    Thelen2003Muscle add_brev_l: max_isometric_force=429 optimal_fiber_length=0.1326204 tendon_slack_length=0.01994291
        pennation_angle_at_optimal=0
      PathPoint P1: pelvis (-0.0517965 -0.0807391 -0.0143063)
      PathPoint P2: femur_l (0.000772064 -0.127739 -0.0252207)
    Thelen2003Muscle add_mag1_l: max_isometric_force=381 optimal_fiber_length=0.08731901 tendon_slack_length=0.06022001
        pennation_angle_at_optimal=0.08726646
      PathPoint P1: pelvis (-0.0645913 -0.103593 -0.0222445)
      PathPoint P2: femur_l (-0.00386032 -0.129341 -0.0290811)
    Thelen2003Muscle add_mag2_l: max_isometric_force=343 optimal_fiber_length=0.131479 tendon_slack_length=0.1303924
        pennation_angle_at_optimal=0.05235988
      PathPoint P1: pelvis (-0.073327 -0.105181 -0.0268679)
      PathPoint P2: femur_l (0.00463238 -0.24405 -0.0194732)
    Thelen2003Muscle add_mag3_l: max_isometric_force=488 optimal_fiber_length=0.1428841 tendon_slack_length=0.271589
        pennation_angle_at_optimal=0.08726646
      PathPoint P1: pelvis (-0.0980163 -0.100708 -0.0425873)
      PathPoint P2: femur_l (0.00600494 -0.409811 0.0228188)
    Thelen2003Muscle tfl_l: max_isometric_force=233 optimal_fiber_length=0.09880501 tendon_slack_length=0.4420224
        pennation_angle_at_optimal=0.05235988
      PathPoint P1: pelvis (-0.0274425 0.0188832 -0.108257)
      PathPoint P2: femur_l (0.0252207 -0.106271 -0.0512136)
      PathPoint P3: femur_l (0.00463238 -0.432454 -0.0306252)
      PathPoint P4: tibia_l (0.00493831 -0.0544894 -0.0244446)
    Thelen2003Muscle pect_l: max_isometric_force=266 optimal_fiber_length=0.09833403 tendon_slack_length=0.03245023
        pennation_angle_at_optimal=0
      PathPoint P1: pelvis (-0.0380312 -0.0677679 -0.0393423)
      PathPoint P2: femur_l (-0.0104658 -0.0877937 -0.0217036)
    Thelen2003Muscle grac_l: max_isometric_force=162 optimal_fiber_length=0.3825507 tendon_slack_length=0.1369358
        pennation_angle_at_optimal=0.05235988
      PathPoint P1: pelvis (-0.065306 -0.10474 -0.024373)
      ConditionalPathPoint P2: tibia_l (-0.0218685 -0.0356922 0.031062) range=(-0.436332 0.174533)
          coordinate=knee_angle_l
      PathPoint P3: tibia_l (-0.0159919 -0.0576558 0.0294653)
      PathPoint P4: tibia_l (0.00493831 -0.0935383 0.0187656)
    Thelen2003Muscle glut_max1_l: max_isometric_force=573 optimal_fiber_length=0.1317114 tendon_slack_length=0.1159431
        pennation_angle_at_optimal=0.08726646
      PathPoint P1: pelvis (-0.105446 0.0540025 -0.0610634)
      PathPoint P2: pelvis (-0.113917 0.00105887 -0.0772888)
      PathPoint P3: femur_l (-0.0392037 -0.0264877 -0.0336277)
      PathPoint P4: femur_l (-0.0237624 -0.0604517 -0.0403189)
    Thelen2003Muscle glut_max2_l: max_isometric_force=819 optimal_fiber_length=0.1413112 tendon_slack_length=0.1220852
        pennation_angle_at_optimal=0
      PathPoint P1: pelvis (-0.119035 0.0155301 -0.0491124)
      PathPoint P2: pelvis (-0.121417 -0.0458845 -0.0797313)
      PathPoint P3: femur_l (-0.0365444 -0.0566067 -0.025135)
      PathPoint P4: femur_l (-0.0133824 -0.108514 -0.0359439)
    Thelen2003Muscle glut_max3_l: max_isometric_force=552 optimal_fiber_length=0.1381372 tendon_slack_length=0.1390964
        pennation_angle_at_optimal=0.08726646
      PathPoint P1: pelvis (-0.137301 -0.0277072 -0.00505954)
      PathPoint P2: pelvis (-0.134918 -0.0928279 -0.0351551)
      PathPoint P3: femur_l (-0.0256497 -0.111184 -0.011581)
      PathPoint P4: femur_l (-0.00514709 -0.151556 -0.0352576)
    Thelen2003Muscle iliacus_l: max_isometric_force=1073 optimal_fiber_length=0.09187246 tendon_slack_length=0.09187246
        pennation_angle_at_optimal=0.1221731
      PathPoint P1: pelvis (-0.0594734 0.0322074 -0.0744973)
      PathPoint P2: pelvis (-0.0227658 -0.0485317 -0.0707463)
      ConditionalPathPoint P3: pelvis (-0.025413 -0.0710327 -0.0711825) range=(-1.5708 0.785398)
          coordinate=hip_flexion_l
      PathPoint P4: femur_l (0.00145834 -0.0579951 -0.00488974)
      PathPoint P5: femur_l (-0.0165565 -0.0663259 -0.0110662)
    Thelen2003Muscle psoas_l: max_isometric_force=1113 optimal_fiber_length=0.09085087 tendon_slack_length=0.1453614
        pennation_angle_at_optimal=0.1396263
      PathPoint P1: pelvis (-0.0570909 0.0782684 -0.0252105)
      PathPoint P2: pelvis (-0.021001 -0.0502965 -0.0662102)
      ConditionalPathPoint P3: pelvis (-0.025413 -0.0710327 -0.0711825) range=(-1.5708 0.785398)
          coordinate=hip_flexion_l
      PathPoint P4: femur_l (0.00137256 -0.0541502 -0.00325982)
      PathPoint P5: femur_l (-0.0161276 -0.0637626 -0.00892163)
    Thelen2003Muscle quad_fem_l: max_isometric_force=381 optimal_fiber_length=0.04607884 tendon_slack_length=0.02047948
        pennation_angle_at_optimal=0
      PathPoint P1: pelvis (-0.100858 -0.101564 -0.0453614)
      PathPoint P2: femur_l (-0.032684 -0.038343 -0.0313973)
    Thelen2003Muscle gem_l: max_isometric_force=164 optimal_fiber_length=0.02079838 tendon_slack_length=0.03379737
        pennation_angle_at_optimal=0
      PathPoint P1: pelvis (-0.0999753 -0.0723563 -0.0622847)
      PathPoint P2: femur_l (-0.0121815 -0.00352457 -0.0380027)
    Thelen2003Muscle peri_l: max_isometric_force=444 optimal_fiber_length=0.0227971 tendon_slack_length=0.1008333
        pennation_angle_at_optimal=0.1745329
      PathPoint P1: pelvis (-0.123182 0.000264718 -0.0204999)
      PathPoint P2: pelvis (-0.10527 -0.0243541 -0.0573123)
      PathPoint P3: femur_l (-0.0126962 -0.00384498 -0.037488)
    Thelen2003Muscle rect_fem_l: max_isometric_force=1169 optimal_fiber_length=0.1195832 tendon_slack_length=0.3251824
        pennation_angle_at_optimal=0.08726646
      PathPoint P1: pelvis (-0.0260306 -0.0274425 -0.0844419)
      ConditionalPathPoint P2: femur_l (0.0286521 -0.430424 -0.00162991) range=(-2.61799 -1.45997)
          coordinate=knee_angle_l
      MovingPathPoint P3: tibia_l (0.0508297 0.0234786 -0.00115227) x_coordinate=knee_angle_l y_coordinate=knee_angle_l
          z_coordinate=knee_angle_l
        x_location: MultiplierFunction: scale=0.8230521
          SimmSpline: x=(-2.0944 -1.99997 -1.5708 -1.45752 -1.39626 -1.0472 -0.698132 -0.526391 -0.349066 -0.174533 0 0.00017453 0.00034907 0.0279253 0.0872665 0.174533 2.0944)
              y=(0.0155805 0.0179938 0.0275081 0.0296564 0.0307615 0.0365695 0.0422074 0.0450902 0.048391 0.0534299 0.0617576 0.0617669 0.0617762 0.0633083 0.066994 0.0733035 0.0573481)
        y_location: MultiplierFunction: scale=1.118879
          SimmSpline: x=(-2.0944 -1.99997 -1.5708 -1.45752 -1.39626 -1.0472 -0.698132 -0.526391 -0.349066 -0.174533 0 0.00017453 0.00034907 0.0279253 0.0872665 0.174533 2.0944)
              y=(0.0234116 0.0237613 0.0251141 0.0252795 0.0253146 0.0249184 0.0242373 0.0238447 0.0234197 0.0227644 0.020984 0.0209814 0.0209788 0.0205225 0.0191754 0.0159554 -0.0673774)
        z_location: MultiplierFunction: scale=0.8230521
          SimmSpline: x=(-2.0944 0.1745) y=(-0.0014 -0.0014)
    Thelen2003Muscle vas_med_l: max_isometric_force=1294 optimal_fiber_length=0.09277826 tendon_slack_length=0.131349
        pennation_angle_at_optimal=0.08726646
      PathPoint P1: femur_l (0.0120099 -0.224184 -0.0161276)
      PathPoint P2: femur_l (0.0305394 -0.295743 -0.000772064)
      ConditionalPathPoint P3: femur_l (0.0317404 -0.432347 0.0107231) range=(-2.61799 -1.21004)
          coordinate=knee_angle_l
      ConditionalPathPoint P4: femur_l (0.0235051 -0.454455 0.0112378) range=(-2.61799 -1.78006)
          coordinate=knee_angle_l
      MovingPathPoint P5: tibia_l (0.0460568 0.0243823 0.0120166) x_coordinate=knee_angle_l y_coordinate=knee_angle_l
          z_coordinate=knee_angle_l
        x_location: MultiplierFunction: scale=0.8230521
          SimmSpline: x=(-2.0944 -1.99997 -1.5708 -1.45752 -1.39626 -1.0472 -0.698132 -0.526391 -0.349066 -0.174533 0 0.00017453 0.00034907 0.0279253 0.0872665 0.174533 2.0944)
              y=(0.00981097 0.0122243 0.0217371 0.0238851 0.0249902 0.0307959 0.0364187 0.0392871 0.0425654 0.0475764 0.0559586 0.0559681 0.0559776 0.0575419 0.0613368 0.0679503 0.0629332)
        y_location: MultiplierFunction: scale=1.118879
          SimmSpline: x=(-2.0944 -1.99997 -1.5708 -1.45752 -1.39626 -1.0472 -0.698132 -0.526391 -0.349066 -0.174533 0 0.00017453 0.00034907 0.0279253 0.0872665 0.174533 2.0944)
              y=(0.0224154 0.0227651 0.0241265 0.0242933 0.0243287 0.0239462 0.0233593 0.0230677 0.0228342 0.0226362 0.0217917 0.0217903 0.0217889 0.0215365 0.0206842 0.0183269 -0.0656205)
        z_location: MultiplierFunction: scale=0.8230521
          SimmSpline: x=(-2.0944 2.0944) y=(0.0146 0.0146)
    Thelen2003Muscle vas_int_l: max_isometric_force=1365 optimal_fiber_length=0.09151221 tendon_slack_length=0.1430536
        pennation_angle_at_optimal=0.05235988
      PathPoint P1: femur_l (0.0248776 -0.205493 -0.0265933)
      PathPoint P2: femur_l (0.0287379 -0.222582 -0.0244487)
      ConditionalPathPoint P3: femur_l (0.0294242 -0.430424 -0.00471817) range=(-2.61799 -1.42) coordinate=knee_angle_l
      MovingPathPoint P4: tibia_l (0.0508297 0.0234786 -0.00115227) x_coordinate=knee_angle_l y_coordinate=knee_angle_l
          z_coordinate=knee_angle_l
        x_location: MultiplierFunction: scale=0.8230521
          SimmSpline: x=(-2.0944 -1.99997 -1.5708 -1.45752 -1.39626 -1.0472 -0.698132 -0.526391 -0.349066 -0.174533 0 0.00017453 0.00034907 0.0279253 0.0872665 0.174533 2.0944)
              y=(0.0155805 0.0179938 0.0275081 0.0296564 0.0307615 0.0365695 0.0422074 0.0450902 0.048391 0.0534299 0.0617576 0.0617669 0.0617762 0.0633083 0.066994 0.0733035 0.0573481)
        y_location: MultiplierFunction: scale=1.118879
          SimmSpline: x=(-2.0944 -1.99997 -1.5708 -1.45752 -1.39626 -1.0472 -0.698132 -0.526391 -0.349066 -0.174533 0 0.00017453 0.00034907 0.0279253 0.0872665 0.174533 2.0944)
              y=(0.0234116 0.0237613 0.0251141 0.0252795 0.0253146 0.0249184 0.0242373 0.0238447 0.0234197 0.0227644 0.020984 0.0209814 0.0209788 0.0205225 0.0191754 0.0159554 -0.0673774)
        z_location: MultiplierFunction: scale=0.8230521
          SimmSpline: x=(-2.0944 0.1745) y=(-0.0014 -0.0014)
    Thelen2003Muscle vas_lat_l: max_isometric_force=1871 optimal_fiber_length=0.08772702 tendon_slack_length=0.163966
        pennation_angle_at_optimal=0.08726646
      PathPoint P1: femur_l (0.00411767 -0.198017 -0.0299389)
      PathPoint P2: femur_l (0.0230761 -0.276732 -0.035086)
      ConditionalPathPoint P3: femur_l (0.0309683 -0.430424 -0.0175859) range=(-2.61799 -1.21004)
          coordinate=knee_angle_l
      ConditionalPathPoint P4: femur_l (0.0217036 -0.453174 -0.0157844) range=(-2.61799 -1.92004)
          coordinate=knee_angle_l
      MovingPathPoint P5: tibia_l (0.0493467 0.0219148 -0.0135804) x_coordinate=knee_angle_l y_coordinate=knee_angle_l
          z_coordinate=knee_angle_l
        x_location: MultiplierFunction: scale=0.8230521
          SimmSpline: x=(-2.0944 -1.99997 -1.5708 -1.45752 -1.39626 -1.0472 -0.698132 -0.526391 -0.349066 -0.174533 0 0.00017453 0.00034907 0.0279253 0.0872665 0.174533 2.0944)
              y=(0.0142897 0.016703 0.0262145 0.0283623 0.0294674 0.0352709 0.0408785 0.0437291 0.0469704 0.0518742 0.0599557 0.0599647 0.0599738 0.0614577 0.0650351 0.0711867 0.0583766)
        y_location: MultiplierFunction: scale=1.118879
          SimmSpline: x=(-2.0944 -1.99997 -1.5708 -1.45752 -1.39626 -1.0472 -0.698132 -0.526391 -0.349066 -0.174533 0 0.00017453 0.00034907 0.0279253 0.0872665 0.174533 2.0944)
              y=(0.0215318 0.0218815 0.0232362 0.0234019 0.0234371 0.0230439 0.0223842 0.0220151 0.0216359 0.0210971 0.0195864 0.0195842 0.019582 0.01919 0.018008 0.0151073 -0.0653421)
        z_location: MultiplierFunction: scale=0.8230521
          SimmSpline: x=(-2.0944 2.0944) y=(-0.0165 -0.0165)
    Thelen2003Muscle med_gas_l: max_isometric_force=1558 optimal_fiber_length=0.06639381 tendon_slack_length=0.4315598
        pennation_angle_at_optimal=0.296706
      PathPoint P1: femur_l (-0.0162991 -0.419637 0.0201594)
      ConditionalPathPoint P2: femur_l (-0.0257355 -0.42957 0.0221325) range=(-0.785398 0.174533)
          coordinate=knee_angle_l
      PathPoint P3: calcn_l (0 0.0272 0.00465033)
    Thelen2003Muscle lat_gas_l: max_isometric_force=683 optimal_fiber_length=0.07093103 tendon_slack_length=0.421153
        pennation_angle_at_optimal=0.1396263
      PathPoint P1: femur_l (-0.0188727 -0.421453 -0.0233335)
      ConditionalPathPoint P2: femur_l (-0.0257355 -0.429143 -0.0235051) range=(-0.785398 0.174533)
          coordinate=knee_angle_l
      PathPoint P3: calcn_l (0 0.0272 0.00465033)
    Thelen2003Muscle soleus_l: max_isometric_force=3549 optimal_fiber_length=0.05517565 tendon_slack_length=0.2758783
        pennation_angle_at_optimal=0.4363323
      PathPoint P1: tibia_l (-0.00197533 -0.171524 -0.00584367)
      PathPoint P2: calcn_l (0 0.0272 0.00465033)
    Thelen2003Muscle tib_post_l: max_isometric_force=1588 optimal_fiber_length=0.03342404 tendon_slack_length=0.3342404
        pennation_angle_at_optimal=0.2094395
      PathPoint P1: tibia_l (-0.00773669 -0.150825 -0.0015638)
      PathPoint P2: tibia_l (-0.011852 -0.453258 0.0188479)
      PathPoint P3: calcn_l (0.0347989 0.0293059 0.0250942)
      PathPoint P4: calcn_l (0.0644239 0.013951 0.0246555)
    Thelen2003Muscle flex_dig_l: max_isometric_force=310 optimal_fiber_length=0.03350529 tendon_slack_length=0.3941799
        pennation_angle_at_optimal=0.1221731
      PathPoint P1: tibia_l (-0.00683133 -0.228923 0.00148149)
      PathPoint P2: tibia_l (-0.012675 -0.453258 0.0161318)
      PathPoint P3: calcn_l (0.0363845 0.0276388 0.0245678)
      PathPoint P4: calcn_l (0.0590831 0.0154426 0.0230762)
      PathPoint P5: calcn_l (0.138361 -0.00710711 -0.0101781)
      PathPoint P6: toes_l (-0.00158556 -0.00684388 -0.0128981)
      PathPoint P7: toes_l (0.0237834 -0.00622969 -0.0188645)
      PathPoint P8: toes_l (0.0368017 -0.00526452 -0.0212336)
    Thelen2003Muscle flex_hal_l: max_isometric_force=322 optimal_fiber_length=0.04158134 tendon_slack_length=0.367463
        pennation_angle_at_optimal=0.1745329
      PathPoint P1: tibia_l (-0.00650211 -0.261146 -0.0200825)
      PathPoint P2: tibia_l (-0.0153088 -0.456391 0.0143211)
      PathPoint P3: calcn_l (0.0312105 0.0242168 0.0211458)
      PathPoint P4: calcn_l (0.0866218 0.00596646 0.022462)
      PathPoint P5: calcn_l (0.144036 -0.00465033 0.0236026)
      PathPoint P6: toes_l (0.0129348 -0.00561549 0.0232516)
      PathPoint P7: toes_l (0.0468993 -0.00894969 0.0158813)
    Thelen2003Muscle tib_ant_l: max_isometric_force=905 optimal_fiber_length=0.1061509 tendon_slack_length=0.2415475
        pennation_angle_at_optimal=0.08726646
      PathPoint P1: tibia_l (0.0147326 -0.181706 -0.0094651)
      PathPoint P2: tibia_l (0.0270784 -0.442069 0.014568)
      PathPoint P3: calcn_l (0.0973034 0.0156181 0.0267613)
    Thelen2003Muscle per_brev_l: max_isometric_force=435 optimal_fiber_length=0.05299912 tendon_slack_length=0.1706572
        pennation_angle_at_optimal=0.08726646
      PathPoint P1: tibia_l (-0.00576137 -0.296055 -0.0267492)
      PathPoint P2: tibia_l (-0.0162964 -0.468139 -0.0232924)
      PathPoint P3: tibia_l (-0.011852 -0.480559 -0.0237862)
      PathPoint P4: calcn_l (0.0393053 0.0236904 -0.0204439)
      PathPoint P5: calcn_l (0.0564961 0.0192155 -0.0300955)
    Thelen2003Muscle per_long_l: max_isometric_force=943 optimal_fiber_length=0.05076942 tendon_slack_length=0.3574582
        pennation_angle_at_optimal=0.1745329
      PathPoint P1: tibia_l (0.000411526 -0.17544 -0.0297945)
      PathPoint P2: tibia_l (-0.0170372 -0.470489 -0.0235393)
      PathPoint P3: tibia_l (-0.0133334 -0.483244 -0.0237862)
      PathPoint P4: calcn_l (0.0365514 0.0201807 -0.019391)
      PathPoint P5: calcn_l (0.0568299 0.00930066 -0.0249187)
      PathPoint P6: calcn_l (0.0710999 0.0060542 -0.0103536)
      PathPoint P7: calcn_l (0.100391 0.00745808 0.0161445)
    Thelen2003Muscle per_tert_l: max_isometric_force=180 optimal_fiber_length=0.0848699 tendon_slack_length=0.1074303
        pennation_angle_at_optimal=0.2268928
      PathPoint P1: tibia_l (0.000823052 -0.313734 -0.0190125)
      PathPoint P2: tibia_l (0.0188479 -0.455272 -0.0130865)
      PathPoint P3: calcn_l (0.0715172 0.0200052 -0.0262349)
    Thelen2003Muscle ext_dig_l: max_isometric_force=512 optimal_fiber_length=0.1043097 tendon_slack_length=0.3528123
        pennation_angle_at_optimal=0.1396263
      PathPoint P1: tibia_l (0.00263377 -0.154517 -0.0227162)
      PathPoint P2: tibia_l (0.0237862 -0.448335 -0.00592598)
      PathPoint P3: calcn_l (0.0769415 0.0340439 8.77421e-5)
      PathPoint P4: calcn_l (0.134856 0.00482581 -0.0114065)
      PathPoint P5: toes_l (0.000250352 0.00412388 -0.0134245)
      PathPoint P6: toes_l (0.0369686 -0.000350968 -0.0219355)
    Thelen2003Muscle ext_hal_l: max_isometric_force=162 optimal_fiber_length=0.1119414 tendon_slack_length=0.3075869
        pennation_angle_at_optimal=0.1047198
      PathPoint P1: tibia_l (0.000987663 -0.197706 -0.0187656)
      PathPoint P2: tibia_l (0.0268315 -0.445873 0.00699594)
      PathPoint P3: calcn_l (0.0809471 0.0341317 0.0185136)
      PathPoint P4: calcn_l (0.107902 0.0271123 0.0225497)
      PathPoint P5: calcn_l (0.144703 0.0121961 0.0245678)
      PathPoint P6: toes_l (0.0248683 0.00359742 0.0214968)
      PathPoint P7: toes_l (0.0469827 0.00298323 0.01632)
    Thelen2003Muscle ercspn_r: max_isometric_force=2500 optimal_fiber_length=0.1147413 tendon_slack_length=0.02868534
        pennation_angle_at_optimal=0
      PathPoint P1: pelvis (-0.123535 0.0387371 0.0380338)
      PathPoint P2: torso (-0.0640187 0.106414 0.0260191)
    Thelen2003Muscle ercspn_l: max_isometric_force=2500 optimal_fiber_length=0.1147413 tendon_slack_length=0.02868534
        pennation_angle_at_optimal=0
      PathPoint P1: pelvis (-0.123535 0.0387371 -0.0380338)
      PathPoint P2: torso (-0.0640187 0.106414 -0.0260191)
    Thelen2003Muscle intobl_r: max_isometric_force=900 optimal_fiber_length=0.09418311 tendon_slack_length=0.09418311
        pennation_angle_at_optimal=0
      PathPoint P1: pelvis (-0.0352958 0.0617676 0.100929)
      PathPoint P2: torso (0.0814784 0.154784 0.0161945)
    Thelen2003Muscle intobl_l: max_isometric_force=900 optimal_fiber_length=0.09418311 tendon_slack_length=0.09418311
        pennation_angle_at_optimal=0
      PathPoint P1: pelvis (-0.0352958 0.0617676 -0.100929)
      PathPoint P2: torso (0.0814784 0.154784 -0.0161945)
    Thelen2003Muscle extobl_r: max_isometric_force=900 optimal_fiber_length=0.1135495 tendon_slack_length=0.1324744
        pennation_angle_at_optimal=0
      PathPoint P1: pelvis (-0.0264718 -0.0561203 0.00872334)
      PathPoint P2: torso (0.0756585 0.106414 0.11876)
    Thelen2003Muscle extobl_l: max_isometric_force=900 optimal_fiber_length=0.1135495 tendon_slack_length=0.1324744
        pennation_angle_at_optimal=0
      PathPoint P1: pelvis (-0.0264718 -0.0561203 -0.00872334)
      PathPoint P2: torso (0.0756585 0.106414 -0.11876)
    HuntCrossleyForce Foot_Ground_R1: transition_velocity=0.1
      ContactParametersSet contact_parameters:
        ContactParameters: geometry=(ground right_1) stiffness=1831235 dissipation=1.020174 static_friction=0.8
            dynamic_friction=0.8 viscous_friction=0
    HuntCrossleyForce Foot_Ground_R2: transition_velocity=0.1
      ContactParametersSet contact_parameters:
        ContactParameters: geometry=(ground right_2) stiffness=1831235 dissipation=1.020174 static_friction=0.8
            dynamic_friction=0.8 viscous_friction=0
    HuntCrossleyForce Foot_Ground_R3: transition_velocity=0.1
      ContactParametersSet contact_parameters:
        ContactParameters: geometry=(ground right_3) stiffness=1831235 dissipation=1.020174 static_friction=0.8
            dynamic_friction=0.8 viscous_friction=0
    HuntCrossleyForce Foot_Ground_R4: transition_velocity=0.1
      ContactParametersSet contact_parameters:
        ContactParameters: geometry=(ground right_4) stiffness=1831235 dissipation=1.020174 static_friction=0.8
            dynamic_friction=0.8 viscous_friction=0
    HuntCrossleyForce Foot_Ground_R5: transition_velocity=0.1
      ContactParametersSet contact_parameters:
        ContactParameters: geometry=(ground right_5) stiffness=1831235 dissipation=1.020174 static_friction=0.8
            dynamic_friction=0.8 viscous_friction=0
    HuntCrossleyForce Foot_Ground_R6: transition_velocity=0.1
      ContactParametersSet contact_parameters:
        ContactParameters: geometry=(ground right_6) stiffness=1831235 dissipation=1.020174 static_friction=0.8
            dynamic_friction=0.8 viscous_friction=0
    HuntCrossleyForce Foot_Ground_R7: transition_velocity=0.1
      ContactParametersSet contact_parameters:
        ContactParameters: geometry=(ground right_7) stiffness=1831235 dissipation=1.020174 static_friction=0.8
            dynamic_friction=0.8 viscous_friction=0
    HuntCrossleyForce Foot_Ground_L1: transition_velocity=0.1
      ContactParametersSet contact_parameters:
        ContactParameters: geometry=(ground left_1) stiffness=1831235 dissipation=1.020174 static_friction=0.8
            dynamic_friction=0.8 viscous_friction=0
    HuntCrossleyForce Foot_Ground_L2: transition_velocity=0.1
      ContactParametersSet contact_parameters:
        ContactParameters: geometry=(ground left_2) stiffness=1831235 dissipation=1.020174 static_friction=0.8
            dynamic_friction=0.8 viscous_friction=0
    HuntCrossleyForce Foot_Ground_L3: transition_velocity=0.1
      ContactParametersSet contact_parameters:
        ContactParameters: geometry=(ground left_3) stiffness=1831235 dissipation=1.020174 static_friction=0.8
            dynamic_friction=0.8 viscous_friction=0
    HuntCrossleyForce Foot_Ground_L4: transition_velocity=0.1
      ContactParametersSet contact_parameters:
        ContactParameters: geometry=(ground left_4) stiffness=1831235 dissipation=1.020174 static_friction=0.8
            dynamic_friction=0.8 viscous_friction=0
    HuntCrossleyForce Foot_Ground_L5: transition_velocity=0.1
      ContactParametersSet contact_parameters:
        ContactParameters: geometry=(ground left_5) stiffness=1831235 dissipation=1.020174 static_friction=0.8
            dynamic_friction=0.8 viscous_friction=0
    HuntCrossleyForce Foot_Ground_L6: transition_velocity=0.1
      ContactParametersSet contact_parameters:
        ContactParameters: geometry=(ground left_6) stiffness=1831235 dissipation=1.020174 static_friction=0.8
            dynamic_friction=0.8 viscous_friction=0
    HuntCrossleyForce Foot_Ground_L7: transition_velocity=0.1
      ContactParametersSet contact_parameters:
        ContactParameters: geometry=(ground left_7) stiffness=1831235 dissipation=1.020174 static_friction=0.8
            dynamic_friction=0.8 viscous_friction=0
    ObjectGroup R_hip_abd: members=(glut_max1_r glut_med1_r glut_med2_r glut_med3_r glut_min1_r glut_min2_r glut_min3_r peri_r sar_r tfl_r)
    ObjectGroup R_hip_flex: members=(add_brev_r add_long_r glut_med1_r glut_min1_r grac_r iliacus_r pect_r psoas_r rect_fem_r sar_r tfl_r)
    ObjectGroup R_hip_inrot: members=(glut_med1_r glut_min1_r iliacus_r psoas_r tfl_r)
    ObjectGroup R_hip_exrot: members=(gem_r glut_med3_r glut_min3_r peri_r quad_fem_r)
    ObjectGroup R_hip_ext: members=(add_long_r add_mag1_r add_mag2_r add_mag3_r bifemlh_r glut_max1_r glut_max2_r glut_max3_r glut_med3_r glut_min3_r semimem_r semiten_r)
    ObjectGroup R_hip_add: members=(add_brev_r add_long_r add_mag1_r add_mag2_r add_mag3_r bifemlh_r grac_r pect_r semimem_r semiten_r)
    ObjectGroup R_knee_bend: members=(bifemlh_r bifemsh_r grac_r lat_gas_r med_gas_r sar_r semimem_r semiten_r)
    ObjectGroup R_knee_ext: members=(rect_fem_r vas_int_r vas_lat_r vas_med_r)
    ObjectGroup R_ankle_pf: members=(flex_dig_r flex_hal_r lat_gas_r med_gas_r per_brev_r per_long_r soleus_r tib_post_r)
    ObjectGroup R_inverter: members=(ext_hal_r flex_dig_r flex_hal_r tib_ant_r tib_post_r)
    ObjectGroup R_ankle_df: members=(ext_dig_r ext_hal_r per_tert_r tib_ant_r)
    ObjectGroup R_everter: members=(ext_dig_r per_brev_r per_long_r per_tert_r)
    ObjectGroup L_hip_abd: members=(glut_max1_l glut_med1_l glut_med2_l glut_med3_l glut_min1_l glut_min2_l glut_min3_l peri_l sar_l tfl_l)
    ObjectGroup L_hip_flex: members=(add_brev_l add_long_l glut_med1_l glut_min1_l grac_l iliacus_l pect_l psoas_l rect_fem_l sar_l tfl_l)
    ObjectGroup L_hip_inrot: members=(glut_med1_l glut_min1_l iliacus_l psoas_l tfl_l)
    ObjectGroup L_hip_exrot: members=(gem_l glut_med3_l glut_min3_l peri_l quad_fem_l)
    ObjectGroup L_hip_ext: members=(add_long_l add_mag1_l add_mag2_l add_mag3_l bifemlh_l glut_max1_l glut_max2_l glut_max3_l glut_med3_l glut_min3_l semimem_l semiten_l)
    ObjectGroup L_hip_add: members=(add_brev_l add_long_l add_mag1_l add_mag2_l add_mag3_l bifemlh_l grac_l pect_l semimem_l semiten_l)
    ObjectGroup L_knee_bend: members=(bifemlh_l bifemsh_l grac_l lat_gas_l med_gas_l sar_l semimem_l semiten_l)
    ObjectGroup L_knee_ext: members=(rect_fem_l vas_int_l vas_lat_l vas_med_l)
    ObjectGroup L_ankle_pf: members=(flex_dig_l flex_hal_l lat_gas_l med_gas_l per_brev_l per_long_l soleus_l tib_post_l)
    ObjectGroup L_inverter: members=(ext_hal_l flex_dig_l flex_hal_l tib_ant_l tib_post_l)
    ObjectGroup L_ankle_df: members=(ext_dig_l ext_hal_l per_tert_l tib_ant_l)
    ObjectGroup L_everter: members=(ext_dig_l per_brev_l per_long_l per_tert_l)
    ObjectGroup back_ext: members=(ercspn_l ercspn_r)
    ObjectGroup back_rlb: members=(ercspn_r extobl_r intobl_r)
    ObjectGroup back_introt: members=(ercspn_r extobl_l intobl_r)
    ObjectGroup back_llb: members=(ercspn_l extobl_l intobl_l)
    ObjectGroup back_extrot: members=(ercspn_l extobl_r intobl_l)
    ObjectGroup back_flex: members=(extobl_l extobl_r intobl_l intobl_r)
  MarkerSet:
    Marker RAC: torso (-0.0193314 0.391524 0.185792)
    Marker C7: torso (-0.0830033 0.433873 0.0015942) fixed=true
    Marker LAC: torso (-0.0183273 0.394174 -0.18956)
    Marker STERNUM: torso (0.076776 0.378681 -0.00486866)
    Marker L5: pelvis (-0.151926 0.0853256 0.00367838)
    Marker RASIS: pelvis (0.0174445 0.0319391 0.118027)
    Marker LASIS: pelvis (0.0142848 0.0269653 -0.113145)
    Marker RIC: pelvis (-0.0292894 0.0581254 0.146345)
    Marker LIC: pelvis (-0.0270522 0.0458424 -0.137058)
    Marker RGT: femur_r (0.00795853 -0.0265327 0.0998279)
    Marker RT1: femur_r (0.0263044 -0.114583 0.116474)
    Marker RT2: femur_r (-0.0517335 -0.115243 0.101275)
    Marker RT3: femur_r (-0.04815 -0.238873 0.0903048)
    Marker RT4: femur_r (0.029933 -0.238307 0.105318)
    Marker RLFE: femur_r (0.00776095 -0.428459 0.0574221) fixed=true
    Marker RMFE: femur_r (0.000725652 -0.432176 -0.0521665) fixed=true
    Marker RS1: tibia_r (0.00697606 -0.120173 0.0929437)
    Marker RS2: tibia_r (-0.0637932 -0.125398 0.0878764)
    Marker RS3: tibia_r (-0.0538659 -0.229186 0.0730515)
    Marker RS4: tibia_r (0.0158347 -0.223636 0.0791453)
    Marker RLM: tibia_r (-0.016236 -0.451639 0.0451406)
    Marker RMM: tibia_r (0.00361948 -0.425144 -0.0379425)
    Marker RHEEL: calcn_r (-0.0276528 0.0370116 -0.00704579)
    Marker R1MTP: calcn_r (0.169388 0.0301408 -0.0395855)
    Marker R5MTP: calcn_r (0.147656 -0.000100218 0.0546714)
    Marker RTOE: toes_r (0.0820123 0.0276235 -0.00889666)
    Marker LGT: femur_l (-0.0080225 -0.0231574 -0.084918)
    Marker LT1: femur_l (0.0108255 -0.154143 -0.107265)
    Marker LT2: femur_l (-0.0644628 -0.157547 -0.0814136)
    Marker LT3: femur_l (-0.0573104 -0.281343 -0.0765188)
    Marker LT4: femur_l (0.0176317 -0.277521 -0.103428)
    Marker LLFE: femur_l (0.00767117 -0.432607 -0.0558611) fixed=true
    Marker LMFE: femur_l (0.0100181 -0.430707 0.0503304) fixed=true
    Marker LS1: tibia_l (-0.0173115 -0.173845 -0.0986242)
    Marker LS2: tibia_l (-0.0813401 -0.174141 -0.0677688)
    Marker LS3: tibia_l (-0.0739529 -0.276665 -0.0525713)
    Marker LS4: tibia_l (-0.00894407 -0.276876 -0.0805031)
    Marker LLM: tibia_l (-0.0201943 -0.450159 -0.0458768)
    Marker LMM: tibia_l (0.00112296 -0.431598 0.036917)
    Marker LHEEL: calcn_l (-0.0295635 0.0256592 0.00753464)
    Marker L1MTP: calcn_l (0.169249 0.0246042 0.0449689)
    Marker L5MTP: calcn_l (0.146781 0.00936321 -0.0518967)
    Marker LTOE: toes_l (0.0806501 0.0278634 0.0074942)
    Marker RA1: humerus_r (0.0286974 -0.172302 0.0335017)
    Marker RA2: humerus_r (-0.0303554 -0.18442 0.0478696)
    Marker RA3: humerus_r (-0.0128261 -0.269548 0.0424288)
    Marker RA4: humerus_r (0.0453811 -0.257074 0.0267204)
    Marker RLE: humerus_r (0.000742499 -0.34505 0.033161)
    Marker RME: humerus_r (-0.0267812 -0.345534 -0.0360473)
    Marker RF1: radius_r (-0.0209605 -0.067586 0.0421221)
    Marker RF2: radius_r (-0.0421099 -0.0639901 -0.00561128)
    Marker RF3: radius_r (-0.0428225 -0.12918 -0.00981632)
    Marker RF4: radius_r (-0.0189934 -0.133881 0.0372623)
    Marker RRSP: radius_r (0.0134903 -0.245643 0.0295896)
    Marker RUSP: radius_r (-0.0410976 -0.245688 0.0100983)
    Marker RFIN: hand_r (-0.0103556 -0.157537 -0.000636968)
    Marker LA1: humerus_l (0.0345975 -0.162245 -0.0214881)
    Marker LA2: humerus_l (-0.0193391 -0.172902 -0.046315)
    Marker LA3: humerus_l (-0.00606594 -0.256718 -0.0434242)
    Marker LA4: humerus_l (0.04946 -0.24595 -0.0198839)
    Marker LLE: humerus_l (-0.00383487 -0.338489 -0.0298389)
    Marker LME: humerus_l (-0.0265204 -0.338289 0.0383457)
    Marker LF1: radius_l (-0.029507 -0.0789828 -0.0269779)
    Marker LF2: radius_l (-0.033058 -0.079543 0.0263995)
    Marker LF3: radius_l (-0.0347467 -0.144398 0.0238689)
    Marker LF4: radius_l (-0.0321737 -0.142791 -0.0289565)
    Marker LRSP: radius_l (0.0145114 -0.240706 -0.0270436)
    Marker LUSP: radius_l (-0.0417094 -0.240249 -0.00815003)
    Marker LFIN: hand_l (-0.0101578 -0.156409 0.00498793)
  ContactGeometrySet:
    ContactHalfSpace ground: body_name=ground location=(0 0.065 0) orientation=(0 0 -1.5708)
    ContactSphere right_1: body_name=toes_r location=(0.0699 -0.0299 -0.0286) radius=0.02
    ContactSphere right_2: body_name=toes_r location=(0.0294 -0.0299 1.521175e-8) radius=0.02
    ContactSphere right_3: body_name=calcn_r location=(0.1499 -0.0282 6.884226e-8) radius=0.02
    ContactSphere right_4: body_name=calcn_r location=(0.1499 -0.0282 -0.02272616) radius=0.02
    ContactSphere right_5: body_name=calcn_r location=(0.07 -0.0282 0.0449) radius=0.02
    ContactSphere right_6: body_name=calcn_r location=(0.119 -0.0282 -6.092648e-8) radius=0.02
    ContactSphere right_7: body_name=calcn_r location=(0 -0.0282 0) radius=0.02
    ContactSphere left_1: body_name=toes_l location=(0.0699 -0.0299 0.0286) radius=0.02
    ContactSphere left_2: body_name=toes_l location=(0.0294 -0.0299 -1.521175e-8) radius=0.02
    ContactSphere left_3: body_name=calcn_l location=(0.1499 -0.0282 -6.884226e-8) radius=0.02
    ContactSphere left_4: body_name=calcn_l location=(0.1499 -0.0282 0.02272616) radius=0.02
    ContactSphere left_5: body_name=calcn_l location=(0.07 -0.0282 -0.0449) radius=0.02
    ContactSphere left_6: body_name=calcn_l location=(0.119 -0.0282 6.092648e-8) radius=0.02
    ContactSphere left_7: body_name=calcn_l location=(0 -0.0282 0) radius=0.02
